# Synthetic negative review fixture only.
# Expected result: MB-004 triggered and failed.

units           real
atom_style      atomic
boundary        p p p
read_data       data.reaxff_minimal

pair_style      reaxff NULL
pair_coeff      * * ffield.reax.cho C H O

# BUG: ReaxFF without charge-capable atom_style and without QEq.
fix             nvt all nvt temp 300 300 100
run             100
